// SBML level 2 version 3

model ssystem()

  // Compartments:
  compartment main;

  // Species:
  species a in main = 0;
  species b in main = 0;
  species c in main = 0;
  species d in main = 0;

  // Parameters:
  ra = ;
  qa = ;
  pa = ;
  oa = ;
  na = ;
  ma = ;
  la = ;
  ka = ;
  ja = ;
  ia = ;
  ha = ;
  ga = ;
  fa = ;
  ea = ;
  da = ;
  ca = ;
  ba = ;
  aa = ;
  z = ;
  y = ;
  x = ;
  w = ;
  v = ;
  u = ;
  t = ;
  s = ;
  r = ;
  q = ;
  p = ;
  o = ;
  n = ;
  m = ;
  l = ;
  k = ;
  j = ;
  i = ;
  h = ;
  g = ;
  f = ;
  e = ;

  // Reactions:
  diff_a: a + b + c + d + a + b + c + d -> a; e*a^g*b^h*c^i*d^j - f*a^k*b^l*c^m*d^n;
  diff_b: a + b + c + d + a + b + c + d -> b; o*a^q*b^r*c^s*d^t - p*a^u*b^v*c^w*d^x;
  diff_c: a + b + c + d + a + b + c + d -> c; y*a^aa*b^ba*c^ca*d^da - z*a^ea*b^fa*c^ga*d^ha;
  diff_d: a + b + c + d + a + b + c + d -> d; ia*a^ka*b^la*c^ma*d^na - ja*a^oa*b^pa*c^qa*d^ra;

  // Unit definitions:
  unit sunit = 1;
end
